// COMSOL Multiphysics 6.1.0.252 model "E-tree_2D_QI_WANG.mph"
// Outline of the model tree

Parameters
  alpha = 10^8[J/m^3]
  gamma = 2*10^-10[J/m]
  epsilon0 = epsilon0_const
  epsilonB = 1e4
  epsilonM = 3.5
  epsilonF = 900
  d0 = sqrt(gamma/alpha)
  t0 = 1/(L0*alpha)
  L0 = 1[m^2/s/N]
  Eb = 188.72[kV/mm]
  fcri = epsilon0*epsilonM*Eb*Eb*0.5
  xi = 2
  c0 = pi
  p = 2  // only suitable for linear and concrete softening
  a2 = -0.5  // linear softening, 1.3868 for concrete
  a3 = 0  // linear softening, 0.6567 for concrete
  b0 = 5e-6[m]  // phase-field length
  hsize = 2.5e-6[m]  // size of the element
  Gfc = 190[J/m^2]
  E_bar = 1/(epsilon0*epsilonM)
  ftc = Eb
  k = 1e-9  // Control Numerical Sigularity
  eta = 1000
  sigmaM = 0.45e-12[S/m]
  sigmaB = 1e-8[S/m]

Functions
  int1: Interpolation "插值 1" | table = {{0, 0}, {100, 1000}, {200, 500}}; fununit = kV; argunit = s
  rn1: Random | mean = 1; seed = 113013

Variables
  var2 "PF"
    sigma1_bar = max(ec.normE/(omega+0.001),0)
    Y_bar = 0.5*sigma1_bar*sigma1_bar/E_bar
    fai = (1-d)^p
    gai = a1*d*(1+a2*d+a3*d*d)
    dfai = -p*(1-d)^(p-1)
    dgai = a1+2*a1*a2*d+3*a1*a3*d*d
    omega = fai/(fai+gai)
    domega = (dfai*(fai+gai)-fai*(dfai+dgai))/(fai+gai)^2
    dalpha = xi+2*(1-xi)*d
    Hmax = max(Y0,Hh)
  var3 "random"
    lch_bar = E_bar*Gfr/ftr/ftr
    Y0 = ftr*ftr/2/E_bar
    a1 = 2*xi*lch_bar/c0/b0
    ck = 2*b0*Gfr/c0
    alpha0 = 2*Gfr/c0/b0
    ph = -domega*Hmax-Gfr*dalpha/c0/b0
    Gfr = Gfc
    ftr = val
  var4 "Weibull"
    rn = 0.5+random(meshelement,1000)  // random number from 0-1
    aa = 188.72
    bb = 15.57
    val = -aa*((-log(1/(rn))^(1/bb)))[kV/mm]

Probes
  pdom1: DomainPoint "域点探针 1" | coords = {-0.0019102, 1.9957478}
    ppb1: PointExpr "点探针表达式 1" | expr = d; unit = 1; descr = Dependent variable d; table = tbl2

Geometry
  geom1 "几何 1" (2D, length unit mm)
    r1: Rectangle "矩形 1" | pos = {-11, 0}; size = {22, 25}
    pol1: Polygon "多边形 1"
      source = table
      table = {{0, 2}, {0.5, 0.5/tan(15[deg])+2}, {0.5, 25}, {-0.5, 25}, {-0.5, 0.5/tan(15[deg])+2}}
    r2: Rectangle "矩形 2" | pos = {-0.5, 0}; size = {1, 2.05}
    r3: Rectangle "矩形 3" | pos = {-1, 0}; size = {2, 2.05}
    par1: Partition "分割对象 1" | input = pol1, r1, r2; tool = r2, r3
    del1: Delete "删除实体 1" | input = par1(1) domains 1; par1(2) domains 1, 3
    pol2: Polygon | type = open; source = table; table = {{0, 2}, {0, 0}}
    fin: Finalize "形成联合体"

Physics
  ec: ConductiveMedia "电流" on domains 1, 2, 4, 5
    dependent variable V2
    ShapeProperty.order_electricpotential = 1
    cucn1: CurrentConservation "电流守恒 1" (default)
      sigma_mat = userdef
      sigma = sigmaM*omega+sigmaB*(1-omega)
      epsilonr_mat = userdef
      epsilonr = epsilonM/(omega+0.001)
    ein1: ElectricInsulation "电绝缘 1" (default)
    init1: init "初始值 1" (default)
    pot1: ElectricPotential "电势 1" (disabled) on boundaries 7, 11 | V0 = int1(t)
    pot2: ElectricPotential "电势 2" on boundaries 2, 5, 10, 14
    ncd1: NormalCurrentDensity on boundaries 7, 11 | nJ_type = nJ; nJ = 100
    bcs1: BoundaryCurrentSource (disabled) on no boundaries
  c: CoefficientFormPDE on domains 1, 2, 4, 5
    dependent variable d
    ShapeProperty.order = 1
    Units.CustomSourceTermUnit = Pa
    cfeq1: CoefficientFormPDE (default) | c = {ck, 0, 0, ck}; f = ph; da = eta
    zflx1: ZeroFluxBoundary "Zero Flux 1" (default)
    init1: init "Initial Values 1" (default)
  dode: DomainODE "域常微分和微分代数方程" on domains 1, 2, 4, 5
    dependent variable Hh
    ShapeProperty.order = 1
    Units.DependentVariableQuantity = none
    Units.CustomDependentVariableUnit = J/m^3
    Units.CustomSourceTermUnit = J/m^3
    dode1: DistributedODE "分布式常微分方程 1" (default) | f = Hh-nojac(if(Y_bar>Hh,Y_bar,Hh)); da = 0
    init1: init "初始值 1" (default)

Mesh
  mesh1 "网格 1"
    size: MeshSizeDefault "大小" | hmax = 0.137; hmin = 6.15E-4; hcurve = 0.3; hgrad = 1.3

Studies
  std1 "Study 1"
    time: Transient "Time Dependent" | tlist = range(0,0.2e-5,0.002); usertol = on; rtol = 0.0001

Solver configurations
  sol1 "Solution 1" (study std1)
    v1: Variables "Dependent Variables 1"
    t1: Time "Time-Dependent Solver 1"
      tlist = range(0,0.2e-5,0.002)
      tout = tsteps
      tstepsstore = 5
      rtol = 0.0001
      maxstepconstraintbdf = const
      maxstepbdf = 0.05
      estrat = exclude
      dDef: Direct
      se1: Segregated "分离 1"
        ssDef: SegregatedStep "分离步骤" | segvar = {comp1_V2}; subdtech = auto; maxsubiter = 1000
        ss1: SegregatedStep "分离步骤 1" | segvar = {comp1_d}; subdtech = auto; subminstep = 1.0E-8; maxsubiter = 1000
        ss2: SegregatedStep "分离步骤 2"
        dode1: SegregatedStep "分离步骤 1a" | segvar = {comp1_Hh}
        ll1: LowerLimit "下限 1" | lowerlimit = comp1.Hh 0
      ps1: PreviousSolution "上一个解 1" | prevcomp = {comp1_Hh}

Datasets
  dset1: Solution | solution = sol1
  dset2: Solution "探针解 2" | solution = sol1
  cpt1: CutPoint2D "域点探针 1" | data = dset2; pointx = -0.0019102; pointy = 1.9957478

Derived values
  pev1: EvalPoint "点探针表达式 1" | data = cpt1; table = tbl2; expr = d; descr = {degradation, 因变量 Hh}
  int1: IntSurface "Surface Integration 1" on domains 1, 2, 4, 5
    data = dset1
    table = new
    expr = ec.rhoq
    unit = C/m
    descr = Space charge density
  av1: AvSurface "Surface Average 1" on domains 1, 2, 4, 5
    data = dset1
    table = tbl1
    expr = ec.normE
    unit = V/m
    descr = Electric field norm
  max1: MaxSurface "Surface Maximum 1" on domains 1, 2, 4, 5
    data = dset1
    table = new
    expr = ec.normE
    unit = V/m
    descr = Electric field norm

Tables
  tbl1: Table
    // Surface Average 1
    Time (s) | Electric field norm (V/m)
    0 | 732.423
    6.10449e-12 | 733.54
    1.95344e-10 | 768.191
    6.25099e-09 | 1877.02
    2.00032e-07 | 37359.4
    6.40102e-06 | 1.17279e+06
    5.12832e-05 | 9.39082e+06
    5.14832e-05 | 9.42713e+06
    5.19833e-05 | 9.51825e+06
    5.30834e-05 | 9.71924e+06
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  tbl2: Table "Probe Table 2"
    Time (s) | degradation (1), Point: (-0.0019102, 1.9957)
    0 | -5.08962e-21
    6.10449e-12 | -5.09739e-21
    1.95344e-10 | -5.33839e-21
    6.25099e-09 | -1.30687e-20
    2.00032e-07 | -2.77684e-19
    6.40102e-06 | -1.45468e-18
    5.12832e-05 | 0.000104189
    5.14832e-05 | 0.000346728
    5.19833e-05 | 0.000752961
    5.30834e-05 | 0.00123499
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
Plots
  pg1: PlotGroup2D "electric field" | data = dset1
    surf1: Surface | expr = ec.normE; unit = kV/mm; descr = Electric field norm
  pg2: PlotGroup2D "V" | data = dset1
    surf1: Surface | expr = V2; descr = Electric potential
  pg3: PlotGroup2D "d" | data = dset1
    surf1: Surface | expr = d
      filt1: Filter (disabled) | expr = d>0.1
  pg5: PlotGroup2D "current density" | data = dset1
    surf1: Surface | expr = ec.normJ; descr = Current density norm
  pg6: PlotGroup2D "charge density" | data = dset1
    surf1: Surface | expr = ec.rhoq; descr = Space charge density
  pg7: PlotGroup1D "tip voltage" | data = dset1
    ptgr1: PointGraph on points 7 | expr = V2
  pg10: PlotGroup2D "Electric Field Norm (ec)" | data = dset1
    surf1: Surface | expr = ec.normE; unit = kV/mm
    str1: Streamline on boundaries 1-7, 9-16 | expr = {ec.Ex, ec.Ey}
      col1: Color "Color Expression 1" | unit = kV/mm; expr = ec.normE
      filt1: Filter | expr = !isScalingSystemDomain
  pg11: PlotGroup1D "1D Plot Group 11" | data = none
    tblp1: Table "Table Graph 1" | table = tbl1
  pg12: PlotGroup1D "Probe Plot Group 12"
    tblp1: Table "Probe Table Graph 1" | table = tbl2; xaxisdata = auto; plotcolumns = 2

Exports
  anim1: Animation "动画 1"
    target = player
    giffilename = E:\WANGQI\COMSOLWORK\phase field\branch\CZM-EC\current loading\current-100.gif
    maxframes = 81
    synchronize = off